New "Line.l1" phases=3 bus1=800.1.2.3 bus2=802.1.2.3 linecode=300 Seasons=1 Ratings=[400,] normamps=400 emergamps=600 length=2.58 units=kft
New "Line.l2a" phases=3 bus1=802.1.2.3 bus2=mid806.1.2.3 linecode=300 Seasons=1 Ratings=[400,] normamps=400 emergamps=600 length=0.865 units=kft
New "Line.l2b" phases=3 bus1=mid806.1.2.3 bus2=806.1.2.3 linecode=300 Seasons=1 Ratings=[400,] normamps=400 emergamps=600 length=0.865 units=kft
New "Line.l3" phases=3 bus1=806.1.2.3 bus2=808.1.2.3 linecode=300 Seasons=1 Ratings=[400,] normamps=400 emergamps=600 length=32.23 units=kft
New "Line.l5" phases=3 bus1=808.1.2.3 bus2=812.1.2.3 linecode=300 Seasons=1 Ratings=[400,] normamps=400 emergamps=600 length=37.5 units=kft
New "Line.l6" phases=3 bus1=812.1.2.3 bus2=814.1.2.3 linecode=300 Seasons=1 Ratings=[400,] normamps=400 emergamps=600 length=29.73 units=kft
New "Line.l7" phases=3 bus1=814r.1.2.3 bus2=850.1.2.3 linecode=301 Seasons=1 Ratings=[400,] normamps=400 emergamps=600 length=0.01 units=kft
New "Line.l24" phases=3 bus1=850.1.2.3 bus2=816.1.2.3 linecode=301 Seasons=1 Ratings=[400,] normamps=400 emergamps=600 length=0.31 units=kft
New "Line.l9a" phases=3 bus1=816.1.2.3 bus2=mid824.1.2.3 linecode=301 Seasons=1 Ratings=[400,] normamps=400 emergamps=600 length=5.105 units=kft
New "Line.l9b" phases=3 bus1=mid824.1.2.3 bus2=824.1.2.3 linecode=301 Seasons=1 Ratings=[400,] normamps=400 emergamps=600 length=5.105 units=kft
New "Line.l13a" phases=3 bus1=824.1.2.3 bus2=mid828.1.2.3 linecode=301 Seasons=1 Ratings=[400,] normamps=400 emergamps=600 length=0.42 units=kft
New "Line.l13b" phases=3 bus1=mid828.1.2.3 bus2=828.1.2.3 linecode=301 Seasons=1 Ratings=[400,] normamps=400 emergamps=600 length=0.42 units=kft
New "Line.l14a" phases=3 bus1=828.1.2.3 bus2=mid830.1.2.3 linecode=301 Seasons=1 Ratings=[400,] normamps=400 emergamps=600 length=10.22 units=kft
New "Line.l14b" phases=3 bus1=mid830.1.2.3 bus2=830.1.2.3 linecode=301 Seasons=1 Ratings=[400,] normamps=400 emergamps=600 length=10.22 units=kft
New "Line.l15" phases=3 bus1=830.1.2.3 bus2=854.1.2.3 linecode=301 Seasons=1 Ratings=[400,] normamps=400 emergamps=600 length=0.52 units=kft
New "Line.l27" phases=3 bus1=854.1.2.3 bus2=852.1.2.3 linecode=301 Seasons=1 Ratings=[400,] normamps=400 emergamps=600 length=36.83 units=kft
New "Line.l25" phases=3 bus1=852r.1.2.3 bus2=832.1.2.3 linecode=301 Seasons=1 Ratings=[400,] normamps=400 emergamps=600 length=0.01 units=kft
New "Line.l32" phases=3 bus1=888.1.2.3 bus2=890.1.2.3 linecode=300 Seasons=1 Ratings=[400,] normamps=400 emergamps=600 length=10.56 units=kft
New "Line.l16a" phases=3 bus1=832.1.2.3 bus2=mid858.1.2.3 linecode=301 Seasons=1 Ratings=[400,] normamps=400 emergamps=600 length=2.45 units=kft
New "Line.l16b" phases=3 bus1=mid858.1.2.3 bus2=858.1.2.3 linecode=301 Seasons=1 Ratings=[400,] normamps=400 emergamps=600 length=2.45 units=kft
New "Line.l28a" phases=1 bus1=858.1 bus2=mid864.1 linecode=303 Seasons=1 Ratings=[400,] normamps=400 emergamps=600 length=0.81 units=kft
New "Line.l28b" phases=1 bus1=mid864.1 bus2=864.1 linecode=303 Seasons=1 Ratings=[400,] normamps=400 emergamps=600 length=0.81 units=kft
New "Line.l29a" phases=3 bus1=858.1.2.3 bus2=mid834.1.2.3 linecode=301 Seasons=1 Ratings=[400,] normamps=400 emergamps=600 length=2.915 units=kft
New "Line.l29b" phases=3 bus1=mid834.1.2.3 bus2=834.1.2.3 linecode=301 Seasons=1 Ratings=[400,] normamps=400 emergamps=600 length=2.915 units=kft
New "Line.l17a" phases=3 bus1=834.1.2.3 bus2=mid860.1.2.3 linecode=301 Seasons=1 Ratings=[400,] normamps=400 emergamps=600 length=1.01 units=kft
New "Line.l17b" phases=3 bus1=mid860.1.2.3 bus2=860.1.2.3 linecode=301 Seasons=1 Ratings=[400,] normamps=400 emergamps=600 length=1.01 units=kft
New "Line.l30a" phases=3 bus1=860.1.2.3 bus2=mid836.1.2.3 linecode=301 Seasons=1 Ratings=[400,] normamps=400 emergamps=600 length=1.34 units=kft
New "Line.l30b" phases=3 bus1=mid836.1.2.3 bus2=836.1.2.3 linecode=301 Seasons=1 Ratings=[400,] normamps=400 emergamps=600 length=1.34 units=kft
New "Line.l20" phases=3 bus1=836.1.2.3 bus2=862.1.2.3 linecode=301 Seasons=1 Ratings=[400,] normamps=400 emergamps=600 length=0.28 units=kft
New "Line.l31a" phases=1 bus1=862.2 bus2=mid838.2 linecode=304 Seasons=1 Ratings=[400,] normamps=400 emergamps=600 length=2.43 units=kft
New "Line.l31b" phases=1 bus1=mid838.2 bus2=838.2 linecode=304 Seasons=1 Ratings=[400,] normamps=400 emergamps=600 length=2.43 units=kft
New "Line.l19a" phases=3 bus1=836.1.2.3 bus2=mid840.1.2.3 linecode=301 Seasons=1 Ratings=[400,] normamps=400 emergamps=600 length=0.43 units=kft
New "Line.l19b" phases=3 bus1=mid840.1.2.3 bus2=840.1.2.3 linecode=301 Seasons=1 Ratings=[400,] normamps=400 emergamps=600 length=0.43 units=kft
New "Line.l18" phases=3 bus1=834.1.2.3 bus2=842.1.2.3 linecode=301 Seasons=1 Ratings=[400,] normamps=400 emergamps=600 length=0.28 units=kft
New "Line.l21a" phases=3 bus1=842.1.2.3 bus2=mid844.1.2.3 linecode=301 Seasons=1 Ratings=[400,] normamps=400 emergamps=600 length=0.675 units=kft
New "Line.l21b" phases=3 bus1=mid844.1.2.3 bus2=844.1.2.3 linecode=301 Seasons=1 Ratings=[400,] normamps=400 emergamps=600 length=0.675 units=kft
New "Line.l22a" phases=3 bus1=844.1.2.3 bus2=mid846.1.2.3 linecode=301 Seasons=1 Ratings=[400,] normamps=400 emergamps=600 length=1.82 units=kft
New "Line.l22b" phases=3 bus1=mid846.1.2.3 bus2=846.1.2.3 linecode=301 Seasons=1 Ratings=[400,] normamps=400 emergamps=600 length=1.82 units=kft
New "Line.l23a" phases=3 bus1=846.1.2.3 bus2=mid848.1.2.3 linecode=301 Seasons=1 Ratings=[400,] normamps=400 emergamps=600 length=0.265 units=kft
New "Line.l23b" phases=3 bus1=mid848.1.2.3 bus2=848.1.2.3 linecode=301 Seasons=1 Ratings=[400,] normamps=400 emergamps=600 length=0.265 units=kft
New "Line.l26a" phases=1 bus1=854.2 bus2=mid856.2 linecode=303 Seasons=1 Ratings=[400,] normamps=400 emergamps=600 length=11.665 units=kft
New "Line.l26b" phases=1 bus1=mid856.2 bus2=856.2 linecode=303 Seasons=1 Ratings=[400,] normamps=400 emergamps=600 length=11.665 units=kft
New "Line.l12a" phases=1 bus1=824.2 bus2=mid826.2 linecode=303 Seasons=1 Ratings=[400,] normamps=400 emergamps=600 length=1.515 units=kft
New "Line.l12b" phases=1 bus1=mid826.2 bus2=826.2 linecode=303 Seasons=1 Ratings=[400,] normamps=400 emergamps=600 length=1.515 units=kft
New "Line.l8" phases=1 bus1=816.1 bus2=818.1 linecode=302 Seasons=1 Ratings=[400,] normamps=400 emergamps=600 length=1.71 units=kft
New "Line.l10a" phases=1 bus1=818.1 bus2=mid820.1 linecode=302 Seasons=1 Ratings=[400,] normamps=400 emergamps=600 length=24.075 units=kft
New "Line.l10b" phases=1 bus1=mid820.1 bus2=820.1 linecode=302 Seasons=1 Ratings=[400,] normamps=400 emergamps=600 length=24.075 units=kft
New "Line.l11a" phases=1 bus1=820.1 bus2=mid822.1 linecode=302 Seasons=1 Ratings=[400,] normamps=400 emergamps=600 length=6.87 units=kft
New "Line.l11b" phases=1 bus1=mid822.1 bus2=822.1 linecode=302 Seasons=1 Ratings=[400,] normamps=400 emergamps=600 length=6.87 units=kft
New "Line.l4a" phases=1 bus1=808.2 bus2=mid810.2 linecode=303 Seasons=1 Ratings=[400,] normamps=400 emergamps=600 length=2.902 units=kft
New "Line.l4b" phases=1 bus1=mid810.2 bus2=810.2 linecode=303 Seasons=1 Ratings=[400,] normamps=400 emergamps=600 length=2.902 units=kft
